// SBML level 2 version 2
// This SBML file has been generated by org.neuroml.export (see https://github.com/NeuroML/org.neuroml.export) org.neuroml.export v1.3.0 org.neuroml.model v1.3.0 jLEMS v0.9.5.2 Export of model: Components: hr_regular (Type: hindmarshRoseCell: a=1.0 (dimensionless) b=3.0 (dimensionless) c=-3.0 (dimensionless) d=5.0 (dimensionless) I=5.0 (dimensionless) r=0.002 (dimensionless) s=4.0 (dimensionless) x1=-1.3 (dimensionless) x0=-1.3 (dimensionless) y0=-1.0 (dimensionless) z0=1.0 (dimensionless) SEC=1.0 (SI time)) net1 (Type: network) sim1 (Type: Simulation: length=2000.0 (SI time) step=0.05 (SI time))

model net1()

  // Compartments:
  compartment hr_regular_pop_0 = 1;

  // Parameters:
  a = 1;
  b = 3;
  c = -3;
  d = 5;
  I = 5;
  r = 0.002;
  s = 4;
  x1 = -1.3;
  x0 = -1.3;
  y0 = -1;
  z0 = 1;
  SEC = 1;
  x = x0;
  y = y0;
  z = z0;

  // Assignment rules:
  P := y - a*x^3 + b*x^2 + I;
  Q := c - d*x^2 - y;
  R := s*(x - x1) - z;

  // Rate rules:
  x' = (P - z)/SEC;
  y' = Q/SEC;
  z' = r*(R/SEC);
end
